Given
λ := 10^-4
μ := 1
μ0 := 1
g := 0.7
mu(m) := μ/(1 + 6.9995100343e-5*(m - 1))
-(g*λ + (1 - g)*λ + λ0)*P0 + mu(m)*P2 + μ0*P1 == 0
-(μ0 + λ)*P1 + λ0*P0 == 0
-mu(m)*P2 + g*λ*P0 + μ*P3 + g*λ*P4 == 0
-μ0*P3 + λ*P1 + λ0*P4 == 0
-(g*λ + λ0)*P4 + (1 - g)*λ*P0 == 0
P0 + P1 + P2 + P3 + P4 == 1
agaga := Find(P0, P1, P2, P3, P4, λ0) → [
    7.0007e32/(4.90014698971e24*m + 1.0001700021e33);
    0;
    (4.90014698971e24*m + 7.0002099853e28)/(4.90014698971e24*m + 1.0001700021e33);
    0;
    3.0003e32/(4.90014698971e24*m + 1.0001700021e33);
    0
]  # error: Это значение имеет единицы измерения: Unitless, а должно: Length.
a(λ0) := (1.0001e13*λ0 + 700070000)/(1.0002e13*λ0^2 + 1.000300027e13*λ0 + 1000170007)
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xdxd(m) := 7.0007e32/(4.90014698971e24*m + 1.0001700021e33)
Given
λ := 10^-4
g := 0.7
μ := 1
μ0 := 1
-(λ0 + (1 - g)*2*λ + 2*λ*g)*P0 + μ0*P6 + μ*P1 == 0
-(μ + (1 - g)*λ + g*λ)*P1 + 2*g*λ*P0 + λ*g*P2 + μ*P5 + μ0*P9 == 0
-(λ0 + (1 - g)*λ + g*λ + g*λ)*P2 + (1 - g)*2*λ*P0 + μ*P3 == 0
-(g*λ + μ)*P3 + (1 - g)*λ*P1 + g*λ*P2 + 2*λ*g*P4 == 0
-(λ0 + 2*λ*g)*P4 + (1 - g)*λ*P2 == 0
-μ*P5 + g*λ*P1 + g*λ*P3 + μ0*P10 == 0
-(μ0 + 2*λ)*P6 + λ0*P0 == 0
-(λ + μ0)*P7 + 2*λ*P6 + λ0*P2 == 0
-μ0*P8 + λ*P7 + λ0*P4 == 0
-(μ0 + λ)*P9 + μ0*P7 == 0
-μ0*P10 + μ0*P8 + λ*P9 == 0
P0 + P1 + P2 + P3 + P4 + P5 + P6 + P7 + P8 + P9 + P10 == 1
Find(P0, P1, P2, P3, P4, P5, P6, P7, P8, P9, P10) → [
    (4.16862532502e33*λ0^2 + 1.00049050284e30*λ0 + 4.08566131521e25)/(4.17029274179e33*λ0^3 + 4.17096038424e33*λ0^2 + 1.25098409737e30*λ0 + 8.33925173027e25);
    (2.50067506e30*λ0^3 + 2.50177536928e30*λ0^2 + 6.0031881077e26*λ0 + 2.45139678913e22)/(1.25108782254e34*λ0^3 + 1.25128811527e34*λ0^2 + 3.75295229212e30*λ0 + 2.50177551908e26);
    (2.500500025e25*λ0^2 + 2.50142533003e29*λ0 + 3.50199541304e25)/(4.17029274179e33*λ0^3 + 4.17096038424e33*λ0^2 + 1.25098409737e30*λ0 + 8.33925173027e25);
    (2.500500025e25*λ0^3 + 2.50177528001e25*λ0^2 + 1.75147545705e25*λ0 + 3.50199541304e21)/(4.17029274179e33*λ0^3 + 4.17096038424e33*λ0^2 + 1.25098409737e30*λ0 + 8.33925173027e25);
    (7.501500075e20*λ0 + 7.50427588508e24)/(4.17029274179e33*λ0^3 + 4.17096038424e33*λ0^2 + 1.25098409737e30*λ0 + 8.33925173027e25);
    (6.7512750775e26*λ0^3 + 3.25314806854e26*λ0^2 + 2.25795417926e25*λ0 + 2.45139678913e18)/(1.25108782254e34*λ0^3 + 1.25128811527e34*λ0^2 + 3.75295229212e30*λ0 + 2.50177551908e26);
    (1.25033753e34*λ0^3 + 3.00087133425e30*λ0^2 + 1.2254533039e26*λ0)/(1.25108782254e34*λ0^3 + 1.25128811527e34*λ0^2 + 3.75295229212e30*λ0 + 2.50177551908e26);
    (2.500500025e30*λ0^3 + 7.50952678009e29*λ0^2 + 1.05073864071e26*λ0)/(1.25108782254e34*λ0^3 + 1.25128811527e34*λ0^2 + 3.75295229212e30*λ0 + 2.50177551908e26);
    (2.500500025e26*λ0^3 + 7.50975182509e25*λ0^2 + 2.25233350416e25*λ0)/(1.25108782254e34*λ0^3 + 1.25128811527e34*λ0^2 + 3.75295229212e30*λ0 + 2.50177551908e26);
    (2.50025e30*λ0^3 + 7.5087759025e29*λ0^2 + 1.05063357735e26*λ0)/(1.25108782254e34*λ0^3 + 1.25128811527e34*λ0^2 + 3.75295229212e30*λ0 + 2.50177551908e26);
    (1.666916675e26*λ0^3 + 5.0061759092e25*λ0^2 + 7.51128045914e24*λ0)/(4.17029274179e33*λ0^3 + 4.17096038424e33*λ0^2 + 1.25098409737e30*λ0 + 8.33925173027e25)
]
P0(λ0) := (4.16862532502e33*λ0^2 + 1.00049050284e30*λ0 + 4.08566131521e25)/(4.17029274179e33*λ0^3 + 4.17096038424e33*λ0^2 + 1.25098409737e30*λ0 + 8.33925173027e25)
P1(λ0) := (2.50067506e30*λ0^3 + 2.50177536928e30*λ0^2 + 6.0031881077e26*λ0 + 2.45139678913e22)/(1.25108782254e34*λ0^3 + 1.25128811527e34*λ0^2 + 3.75295229212e30*λ0 + 2.50177551908e26)
P6(λ0) := (1.25033753e34*λ0^3 + 3.00087133425e30*λ0^2 + 1.2254533039e26*λ0)/(1.25108782254e34*λ0^3 + 1.25128811527e34*λ0^2 + 3.75295229212e30*λ0 + 2.50177551908e26)
S2(λ0) := P0(λ0) + P1(λ0) + P6(λ0)
Given
λ := 10^-4
g := 0.7
μ := 1
μ0 := 1
-((1 - g)*2*λ + 2*λ*g)*P0 + μ*P1 == 0
-(μ + (1 - g)*λ + g*λ)*P1 + 2*g*λ*P0 + λ*g*P2 + μ*P5 == 0
-((1 - g)*λ + g*λ + g*λ)*P2 + (1 - g)*2*λ*P0 + μ*P3 == 0
-(g*λ + μ)*P3 + (1 - g)*λ*P1 + g*λ*P2 + 2*λ*g*P4 == 0
-(2*λ*g)*P4 + (1 - g)*λ*P2 == 0
-μ*P5 + g*λ*P1 + g*λ*P3 == 0
P0 + P1 + P2 + P3 + P4 + P5 == 1
Find(P0, P1, P2, P3, P4, P5) → [0.489931404802; 9.79862809604e-5; 0.419941204116; 4.19941204116e-5; 0.089987400882; 9.79862809604e-9]
S1 := 0.489931404802 + 9.79862809604e-5
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