λ1 := 10^-4
μ1 := 1.0
λ2 := 10^-4
μ2 := 1.0
Given
-(2*λ1 + 2*λ2)*P0 + μ1*P1 + μ2*P2 == 0
-(μ1 + λ1 + 2*λ2)*P1 + μ1*P3 + 2*λ1*P0 + μ2*P4 == 0
-(μ2 + λ2 + 2*λ1)*P2 + μ2*P5 + 2*λ2*P0 == 0
-μ1*P3 + λ1*P1 == 0
-μ2*P5 + λ2*P2 == 0
-μ2*P6 + λ1*P4 == 0
-μ1*P7 + λ2*P4 == 0
P0 + P1 + P2 + P3 + P4 + P5 + P6 + P7 == 1
P := Find(P0, P1, P2, P3, P4, P5, P6, P7) → [0.999600040016; 0.00019995998401; 0.000199880031997; 1.9995998401e-8; 7.99680032013e-8; 1.99880031997e-8; 7.99680032013e-12; 7.99680032013e-12]
P := P[0] + P[1] + P[2] + P[4] = 1
