λ1 := 10^-4
λ2 := 5*10^-4
t := 0, 1 .. 50000
p(t) := e^(-λ1*t)
pk(t) := e^(-λ2*t)
P(t) := p(t)^5 + 5*p(t)^4*(1 - p(t)) + 8*p(t)^3*(1 - p(t))^2 + 2*p(t)^2*(1 - p(t))^3
P3(t) := p(t)*(1 - (1 - p(t))^2)^2 + (1 - p(t))*(1 - (1 - p(t)^2)^2)
P4_1(t) := 1 - (1 - p(t)^2)^2*(1 - p(t)^3)^2
P4_2(t) := (1 - (1 - p(t))^2)^2*(1 - (1 - p(t))^3)^2
Ps_1(t) := pk(t)^2*(pk(t)^2*P3(t) + 2*pk(t)*(1 - pk(t))*(1 - p(t)^2))
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