λ1 := 10^-4
μ1 := 1.0
λ2 := 10^-4
μ2 := 1.0
Given
-(λ1 + λ2)*P0 + μ1*P1 + μ2*P2 == 0
-(μ1 + λ2)*P1 + μ2*P4 + λ1*P0 == 0
-(μ2 + λ1)*P2 + μ1*P3 + λ2*P0 == 0
-μ2*P4 + λ1*P2 == 0
P0 + P1 + P2 + P3 + P4 == 1
P := Find(P0, P1, P2, P3, P4) → [0.99980002; 9.9980002e-5; 9.9980002e-5; 9.9980002e-9; 9.9980002e-9]
Pr := P[0] + P[1] + P[2] = 1
h
