λ1 := 10^-4
λ2 := 10^-4
D := [1; 0; 0; 0; 0]
SS(t, P) := [
    -2*(λ1 + λ2)*P[0];
    -(2*λ2 + λ1)*P[1] + P[0]*2*λ1;
    -(2*λ1 + λ2)*P[2] + P[0]*2*λ2;
    -(λ1 + λ2)*P[3] + P[1]*2*λ2 + P[2]*2*λ1;
    P[1]*λ1 + P[3]*(λ1 + λ2) + P[2]*λ2
]
F1 := rkfixed(D, 0, 1000, 1000, SS)
k := 0 .. 1000
Kres[k] := F1[k, 1] + F1[k, 2] + F1[k, 3] + F1[k, 4]
P1(t) := e^(-λ1*t)
P2(t) := e^(-λ2*t)
Pres(t) := (1 - (1 - P1(t))^2)*(1 - (1 - P2(t))^2)
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