λ1 := 10^-4
μ := 1.0
λ2 := 10^-4
Given
-(2*λ1 + 2*λ2)*P0 + P1*μ == 0
-μ*P1 + P0*2*λ1 + P2*λ1 + P4*μ == 0
-(λ1 + λ2)*P3 + P2*λ1 == 0
-μ*P4 + P2*λ2 + P3*(λ1 + λ2) == 0
P0 + P1 + P2 + P3 + P4 == 1
P := Find(P0, P1, P2, P3, P4) → [0.499866702213; 0.000199946680885; 0.333244468142; 0.166622234071; 6.66488936284e-5]
K := P[0] + P[1] + P[2] + P[3] = 0.999933
