l := 1000
S := 10^7
v := l/S
t[0] := v
m := 10
n := 10
k := 1 .. 3
λ := 1 .. 25000
P(k, λ) := 1 - (k*λ/n)*v*e^((k*λ/n - 1/v)*t[0])
P1(k, λ) := 1 - (1 - P(k, λ)^m)^k
P2(k, λ) := (1 - ((1 - P(k, λ))^k))^m
P2gr[k, λ] := P2(k, λ)
Pgr[k, λ] := P(k, λ)
P1gr[k, λ] := P1(k, λ)
# [component: inputs P2gr]
# [component: inputs P1gr]
# [component: inputs Pgr]
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