l := 1000
S := 10^7
v := l/S
t[0] := v
m := 10
n := 10
k := 1 .. 3
λ := 1 .. 25000
P(k, λ) := 1 - (k*λ/n)*v*e^((k*λ/n - 1/v)*t[0])
P1(k, λ) := 1 - (1 - P(k, λ)^m)^k
P2(k, λ) := (1 - ((1 - P(k, λ))^k))^m
b := 10^-4
a := (1 - b)^l
A1(k, λ) := 1 - (1 - a^(m + 1)*P(k, λ)^m)^k
A2(k, λ) := 1 - (1 - a*P(k, λ))^k*(1 - (1 - a^2*P(k, λ))^k)
A2gr[k, λ] := A2(k, λ)
A1gr[k, λ] := A1(k, λ)
# [component: inputs A1gr]
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# [component: inputs A2gr]
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