λ := 10^-4
μ := 1
μ0 := 1
g := 0.7
Given
-(λ0 + g*λ + (1 - g)*λ)*P0 + P1*μ + P2*μ/(1 + P2*(m - 1)) == 0
-(μ0 + λ)*P1 + P0*λ0 == 0
-μ/(1 + P2*(m - 1))*P2 + P0*g*λ + P3*μ0 + P4*g*λ == 0
-μ0*P3 + P1*λ + P4*λ0 == 0
-(λ0 + g*λ)*P4 + P0*(1 - g)*λ == 0
P0 + P1 + P2 + P3 + P4 == 1
