λ := 10^-4
g := 0.7
μ := 1
μ0 := 1
Given
-(2*g*λ + λ0 + (1 - g)*2*λ)*P0 + (P6*μ0 + P1*μ) == 0
-(g*λ + g*λ + (1 - g)*2*λ + λ0)*P2 + (P0*(1 - g)*2*λ + P3*μ) == 0
-(g*λ + μ)*P3 + (P1*(1 - g)*λ + P2*g*λ + P4*2*λ*g) == 0
-(2*λ*g + λ0)*P4 + P2*(1 - g)*λ == 0
-μ*P5 + (P1*g*λ + P3*g*λ + P10*μ0) == 0
-(μ0 + 2*λ)*P6 + P0*λ0 == 0
-(λ + μ0)*P7 + (P2*λ0 + P6*2*λ) == 0
-μ0*P8 + (P4*λ0 + P7*λ) == 0
-μ*P9 + P7*μ0 == 0
-μ0*P10 + P8*μ0 == 0
P0 + P1 + P2 + P3 + P4 + P5 + P6 + P7 + P8 + P9 + P10 == 1
P(λ0) := Find(P0, P1, P2, P3, P4, P5, P6, P7, P8, P9, P10) → [
    (6.25231275626e28*λ0^2 + 1.68815507838e25*λ0 + 8.75385054252e20)/(6.25481350632e28*λ0^3 + 6.25600260172e28*λ0^2 + 2.06392168249e25*λ0 + 1.51341234371e21);
    (1.25021250875e25*λ0^3 + 1.25080011475e25*λ0^2 + 3.37648519876e21*λ0 + 1.7507701085e17)/(6.25481350632e28*λ0^3 + 6.25600260172e28*λ0^2 + 2.06392168249e25*λ0 + 1.51341234371e21);
    (3.750375e20*λ0^2 + 3.75176281877e24*λ0 + 5.25246787277e20)/(6.25481350632e28*λ0^3 + 6.25600260172e28*λ0^2 + 2.06392168249e25*λ0 + 1.51341234371e21);
    (3.750375e20*λ0^3 + 3.7524002025e20*λ0^2 + 2.62706304004e20*λ0 + 5.25262542002e16)/(6.25481350632e28*λ0^3 + 6.25600260172e28*λ0^2 + 2.06392168249e25*λ0 + 1.51341234371e21);
    (1.1251125e16*λ0 + 1.12552882988e20)/(6.25481350632e28*λ0^3 + 6.25600260172e28*λ0^2 + 2.06392168249e25*λ0 + 1.51341234371e21);
    (2.12530000875e21*λ0^3 + 1.251073896e21*λ0^2 + 1.12860163322e20*λ0 + 1.59322285535e13)/(6.25481350632e28*λ0^3 + 6.25600260172e28*λ0^2 + 2.06392168249e25*λ0 + 1.51341234371e21);
    (6.25106254375e28*λ0^3 + 1.68781751488e25*λ0^2 + 8.7521001225e20*λ0)/(6.25481350632e28*λ0^3 + 6.25600260172e28*λ0^2 + 2.06392168249e25*λ0 + 1.51341234371e21);
    (1.250125e25*λ0^3 + 3.7547629775e24*λ0^2 + 5.2536929235e20*λ0)/(6.25481350632e28*λ0^3 + 6.25600260172e28*λ0^2 + 2.06392168249e25*λ0 + 1.51341234371e21);
    (1.250125e21*λ0^3 + 3.75487548875e20*λ0^2 + 1.12605419917e20*λ0)/(6.25481350632e28*λ0^3 + 6.25600260172e28*λ0^2 + 2.06392168249e25*λ0 + 1.51341234371e21);
    (1.250125e25*λ0^3 + 3.7547629775e24*λ0^2 + 5.2536929235e20*λ0)/(6.25481350632e28*λ0^3 + 6.25600260172e28*λ0^2 + 2.06392168249e25*λ0 + 1.51341234371e21);
    (1.250125e21*λ0^3 + 3.75487548875e20*λ0^2 + 1.12605419917e20*λ0)/(6.25481350632e28*λ0^3 + 6.25600260172e28*λ0^2 + 2.06392168249e25*λ0 + 1.51341234371e21)
]
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