λ := 10^-4
n := 5
μ := 0.9
v := 0.001
Given
-5*λ*P0 + P1*μ == 0
-(4*λ + μ)*P1 + P0*5*λ + P2*2*μ == 0
-(3*λ + 2*μ)*P2 + P1*4*λ + P3*3*μ == 0
-(2*λ + 3*μ)*P3 + P2*3*λ + P4*4*μ == 0
-(λ + 4*μ)*P4 + P3*2*λ + P5*5*μ == 0
-5*μ*P5 + P4*λ == 0
P0 + P1 + P2 + P3 + P4 + P5 == 1
P := Find(P0, P1, P2, P3, P4, P5) → [0.999444629582; 0.000555247016434; 1.23388225874e-7; 1.37098028749e-11; 7.61655715273e-16; 1.69256825616e-20]
r(i, t0, Λ) := 1 - (Λ/(n - i))*v*e^((Λ/(n - i) - 1/v)*t0)
KC(t0, Λ) := sum(r(i, t0, Λ)*P[i], i = 0 .. n - 1)
Λ := 200, 205 .. 4000
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r_copy(i, t0, Λ, a) := 1 - ((a*Λ/(n - i))*v*e^((a*Λ/(n - i) - 1/v)*t0))^a
KC_copy(t0, Λ, a) := sum(r_copy(i, t0, Λ, a)*P[i], i = 0 .. n - 1)
Λ := 0, 5 .. 800
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Λ := 0, 5 .. 800
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