n2 := 5
n1 := 7
Pk := 0.95
μ := 1
v := 0.01
λ := 10^-4
p := 1/λ/(1/λ + 1/μ)
Pc2(Λ, β) := sum({
    1 if β*Λ*v/j < 1
    0 otherwise
}*combin(n2, j)*p^j*(1 - p)^(n2 - j), j = 1 .. n2)
Pc1(Λ) := sum({
    1 if Λ*v/i < 1
    0 otherwise
}*combin(n1, i)*p^i*(1 - p)^(n1 - i), i = 1 .. n1)
Pc(Λ, β) := Pc1(Λ)*Pc2(Λ, β)
Pck(Λ, β) := (1 - Pk)*Pc(Λ, β) + Pk*sum(sum({
    1 if Λ*(1 + β)*v/(i + j)
    0 otherwise
}*combin(n1, i)*combin(n2, j)*p^(i + j)*(1 - p)^(n1 + n2 - i - j), j = 1 .. n2), i = 1 .. n1)
Λ := 1, 2 .. 1000
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