n2 := 5
n1 := 7
Pk := 0.9
μ := 1
v := 0.01
λ := 10^-4
p := 1/λ/(1/λ + 1/μ)
Pc1(Λ, t0) := sum((1 - (Λ*v/i)*e^((Λ/i - 1/v)*t0))*combin(n1, i)*p^i*(1 - p)^(n1 - i), i = 1 .. n1)
Pc2(Λ, t0, β) := sum((1 - (β*Λ*v/j)*e^((β*Λ/j - 1/v)*t0))*combin(n2, j)*p^j*(1 - p)^(n2 - j), j = 1 .. n2)
Pc(Λ, t0, β) := Pc1(Λ, t0)*Pc2(Λ, t0, β)
Pck(Λ, t0, β) := (1 - Pk)*Pc(Λ, t0, β) + Pk*sum(sum((1 - (Λ*(1 + β)*v/(i + j)*e^((Λ*(1 + β)/(i + j) - 1/v)*t0)))*combin(n1, i)*combin(n2, j)*p^(i + j)*(1 - p)^(n1 + n2 - i - j), j = 1 .. n2), i = 1 .. n1)
Λ := 1, 10 .. 600
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