n1 := 5
n2 := 7
Pk := 0.9
μ := 1
v := 0.01
t1 := 0.00001
λ := 10^-4
B1(d, gg, i, j, Λ, β, t0) := gg*(1 - Λ*(gg + (1 - d)*β)*v/i*e^((Λ*(gg + (1 - d)*β)/i - 1/v)*t0)) + (1 - gg)*(1 - Λ*(1 - gg + d*β)*v/j*e^((Λ*((1 - gg) + d*β)/j - 1/v)*(t0 - t1)))
B2(d, gg, i, j, Λ, β, t0) := d*(1 - Λ*(d*β + 1 - gg)*v/j*e^((Λ*(d*β + 1 - gg)/j - 1/v)*t0)) + (1 - d)*(1 - Λ*(gg + (1 - d)*β)*v/i*e^((Λ*(gg + (1 - d)*β)/i - 1/v)*(t0 - t1)))
B(d, gg, i, j, Λ, β, t0) := B1(d, gg, i, j, Λ, β, t0)*B2(d, gg, i, j, Λ, β, t0)
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