m := 20
d := 200
F := 1, 2 .. 100
L := 4096
S := 10*10^6
v0 := (L + d)/S
v(F) := (L/F + d)/S
Λ < m/v(F)
t0 := v(1)
P(F, Λ) := 1 - Λ*F*v(F)/m*e^((Λ*F/m - 1/v(F))*t0)
Pc(F, Λ) := P(F, Λ)^F
W(F, Λ) := integral(1 - Pc(F, Λ), t = 0 .. 5000)
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K := 1, 2 .. 5
Pk(K, F, Λ) := 1 - (K*Λ*F*v(F)/m*e^((K*Λ*F/m - 1/v(F))*t0))^K
Pck(K, F, Λ) := Pk(K, F, Λ)^F
Wk(K, F, Λ) := integral(1 - Pck(K, F, Λ), t = 0 .. 5000)
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