Given
λ := 10^-4
λ1 := 10^-4
μ := 1
μ1 := 1
S := 10^6
n := 2
V := l/S
-(4*λ + 2*λ1)*P0 + μ*P1 + μ1*P4 == 0
-(3*λ + 2*λ1 + μ)*P1 + μ*P2 + μ1*P5 + 4*λ*P9 == 0
-(2*λ + 2*λ1 + μ)*P2 + μ*P3 + μ1*P6 + 3*λ*P1 == 0
-(λ + 2*λ1 + μ)*P3 + μ*P8 + 2*λ*P2 == 0
-(4*λ + λ1 + μ1)*P4 + μ1*P10 + 2*λ1*P0 == 0
-(μ1 + 3*λ)*P5 + 2*λ1*P1 + 4*λ*P4 == 0
-(μ1 + 2*λ)*P6 + 2*λ1*P2 + μ*P7 + 3*λ*P5 == 0
-(μ + λ)*P7 + 2*λ1*P3 + 2*λ*P6 + μ*P9 == 0
-μ*P8 + λ*P3 == 0
-λ1*P10 + μ1*P4 == 0
P0 + P1 + P2 + P3 + P4 + P5 + P6 + P7 + P8 + P8 + P9 + P10 == 1
x := Find(P0, P1, P2, P3, P4, P5, P6, P7, P8, P9, P10) → [
    31275004999280918703734496149700000000/31362569393909800494799976168417638973;
    18765628562256083728241997809820000/31362569393909800494799976168417638973;
    18763755626174874264352722569865000/31362569393909800494799976168417638973;
    3752000725089956861498244865000/31362569393909800494799976168417638973;
    -625562687532506001300120000000/31362569393909800494799976168417638973;
    288596150952883653615290760000/2412505337993061576523075089878279921;
    18761879439131577432078492814685000/31362569393909800494799976168417638973;
    18761877938369180056465788869100000/31362569393909800494799976168417638973;
    750400145017991372299648973/62725138787819600989599952336835277946;
    18760000999875045640993647449775000/31362569393909800494799976168417638973;
    -6255626875325060013001200000000000/31362569393909800494799976168417638973
]
Kg := x[0] + x[1] + x[2] + x[3] + x[4] + x[5] + x[6] + x[7]
Kg → 31350065019034850364153992348668215000/31362569393909800494799976168417638973
t := 1 .. 50000
Kog(t) := Kg*e^(-λ*t)
V := 0.01
k := 1 .. 4
k1 := 1
V1 := 0.01
Vk := 10^-3
t0 := 1
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P(k) := 1 - (e^(((λ*k/2) - 1/Vk)*t)*(λ*k*Vk)/2)^k
Tk(k) := integral((e^(((λ*k/2) - 1/Vk)*t)*(λ*k*Vk)/2)^k, t = 0 .. ∞)
Pc(k) := 1 - (e^(((λ*k1/n) - 1/V)*(t0 - Tk(k) - Vk))*(λ*k1*V1)/n)^k1
(λ*k1*V1)/n
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