l := 1000
S := 10^7
v := l/S
t[0] := v
m := 5
n := 3
k := 2
λ := 10^-1 .. 10^4
P(k, λ) := 1 - (k*λ/n)*v*e^((k*λ/n - 1/v)*t[0])
P1(k, λ) := 1 - (1 - P(k, λ)^m)^k
P2(k, λ) := (1 - ((1 - P(k, λ))^k))^m
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b := 10^-9
a := (1 - b)^l
A1(k, λ) := 1 - (1 - a^(m + 1)*P(k, λ)^m)^k
A2(k, λ) := 1 - (1 - a*P(k, λ))^k*(1 - (1 - a^2*P(k, λ))^k)
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