Given
n1 := 5
n2 := 8
v1 := 10^-2
v2 := 4*10^-2
t := 0.1
r1(λ, β) := 1 - λ*β*v1*e^((λ*β/n1 - 1/v1)*t)/n1
r2(λ, β) := 1 - λ*(1 - β)*v2*e^((λ*(1 - β)/n2 - 1/v2)*t)/n2
R(λ, β) := β*r1(λ, β) + (1 - β)*r2(λ, β)
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T(λ, β) := integral((λ*β*v1/n1)*e^(((λ*β/n1) - 1/v1)*t), t = 0 .. ∞)*β + integral((λ*(1 - β)*v2/n2)*e^(((λ*(1 - β)/n2) - 1/v2)*t), t = 0 .. ∞)*(1 - β)
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b1(λ, k1) := (λ*k1*v1*e^((λ*k1/n1 - 1/v1)*t)/n1)^k1
B(λ, k1, k2) := 1 - (λ*k1*v1*e^((λ*k1/n1 - 1/v1)*t)/n1)^k1*(λ*k2*v2*e^((λ*k2/n2 - 1/v2)*t)/n2)^k2
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Maximize(B, k1, k2) → [0; 0]
T1(λ, k1, k2) := integral((λ*k1*v1*e^((λ*k1/n1 - 1/v1)*t)/n1)^k1*(λ*k2*v2*e^((λ*k2/n2 - 1/v2)*t)/n2)^k2, t = 0 .. ∞)
T2(λ, k1, k2) := integral((λ*k1*v1/n1)*e^(((λ*k1/n1) - 1/v1)*t), t = 0 .. ∞)*k1 + integral((λ*k2*v2/n2)*e^(((λ*k2/n2) - 1/v2)*t), t = 0 .. ∞)*k2
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