Given
λ := 10^-4
μ := 1
μ0 := 1
g := 0.7
-(λ0 + g*λ + (1 - g)*λ)*P0 + P1*μ0 + P2*μ == 0
-(λ + μ0)*P1 + P0*λ0 == 0
-μ*P2 + g*λ*P0 + P3*μ0 + g*λ*P4 == 0
-(λ0 + g*λ)*P4 + (1 - g)*λ*P0 == 0
P0 + P1 + P2 + P3 + P4 == 1
Find(P0, P1, P2, P3, P4) → [
    (1.0001e13*λ0 + 700070000)/(1.0002e13*λ0^2 + 1.000300027e13*λ0 + 1000170007);
    (1e13*λ0^2 + 700000000*λ0)/(1.0002e13*λ0^2 + 1.000300027e13*λ0 + 1000170007);
    (1000000000*λ0^2 + 1000170000*λ0 + 70007.0)/(1.0002e13*λ0^2 + 1.000300027e13*λ0 + 1000170007);
    (1000000000*λ0^2 + 300100000*λ0)/(1.0002e13*λ0^2 + 1.000300027e13*λ0 + 1000170007);
    300030000/(1.0002e13*λ0^2 + 1.000300027e13*λ0 + 1000170007)
]
a(λ0) := (1.0001e13*λ0 + 700070000)/(1.0002e13*λ0^2 + 1.000300027e13*λ0 + 1000170007)
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λ0 := 5*10^-3
p2 := (1000000000*λ0^2 + 1000170000*λ0 + 70007.0)/(1.0002e13*λ0^2 + 1.000300027e13*λ0 + 1000170007) → 9.94018335455e-5
m := 1 .. 4
μ2(m) := μ/(1 + p2*(m - 1))
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