Given
L := 4096
d := 160
m := 10
S := 10^7
V0 := (L + d)/s
V(F) := (L/F - d)/S
T(Λ) := V0/(1 - Λ*V0) - V0
t0 := V(1)
P(F, Λ) := 1 - Λ*F*V(F)*e^((Λ*F/m - 1/V(F))*t0)/m
Pc(F, Λ) := P(F, Λ)^F
W(F, Λ) := integral(1 - P(F, Λ)^F, t = 0 .. ∞)
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F := 1 .. 3
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P(F, Λ, k) := 1 - k*Λ*F*V(F)*e^((k*Λ*F/m - 1/V(F))*t0)/m
R(F, Λ, k) := 1 - (k*Λ*F*V(F)*e^((k*Λ*F/m - 1/V(F))*t0)/m)^k
W(F, Λ, k) := integral(1 - R(F, Λ, k), t = 0 .. ∞)
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