Given
v := 10^-3
λ := 0.001
μ := 5000
n := 5
Λ := 1000
-(5*λ)*P0 + μ*P1 == 0
-(4*λ + μ)*P1 + 5*λ*P0 + μ*P2 == 0
-(3*λ + μ)*P2 + 4*λ*P1 + μ*P3 == 0
-(2*λ + μ)*P3 + 3*λ*P2 + μ*P4 == 0
-μ*P5 + λ*P4 == 0
P0 + P1 + P2 + P3 + P4 + P5 == 1
P := Find(P0, P1, P2, P3, P4, P5) → [0.999999; 9.99999e-7; 7.999992e-13; 4.7999952e-19; 1.91999808e-25; 3.83999616e-32]
K := 1 - P[5] → 1.0
r(i, t0, Λ) := 1 - (Λ/(n - i))*v*e^((Λ/(n - i) - 1/v)*t0)
Kc(t0, Λ) := sum(r(i, t0, Λ)*P[i], i = 0 .. n - 1)
Λ := 200, 205 .. 5000
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ra(i, t0, Λ, a) := 1 - ((Λ*a/(n - i))*v*e^((Λ*a/(n - i) - 1/v)*t0))^a
Kca(t0, Λ, a) := sum(ra(i, t0, Λ, a)*P[i], i = 0 .. 4)
Λ := 0, 5 .. 1200
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