Given
n1 := 3
n2 := 3
g := 0.6
d := 0.5
Pk := 0.95
λ := 10^-4
μ := 1
v := 0.1
β := 0.6
P := 1/λ/(1/λ - 1/μ)
Pc1(Λ) := sum(if(Λ*v/i < 1, 1, 0)*combin(n1, i)*P^i*(1 - P)^(n1 - i), i = 1 .. n1)
Pc2(Λ, β) := sum(if(β*Λ*v/j < 1, 1, 0)*combin(n2, j)*P^j*(1 - P)^(n2 - j), j = 1 .. n1)
Pc(Λ, β) := (1 - Pk)*Pc1(Λ)*Pc2(Λ, β) + Pk*sum(sum(if(Λ*(1 + β)*v/(i + j) < 1, 1, 0)*combin(n1, i)*combin(n2, j)*P^(i + j)*(1 - P)^(n1 + n2 - i - j), j = 1 .. n2), i = 1 .. n1)
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δ1(Λ, i, t0) := 1 - Λ*v/i*e^((Λ/i - 1/v)*t0)
δ2(Λ, i, t0) := 1 - β*Λ*v/i*e^((β*Λ/i - 1/v)*t0)
Pc1(Λ, t0) := sum(δ1(Λ, i, t0)*combin(n1, i)*P^i*(1 - P)^(n1 - i), i = 1 .. n1)
Pc2(Λ, t0) := sum(δ2(Λ, j, t0)*combin(n2, j)*P^j*(1 - P)^(n2 - j), j = 1 .. n1)
Pc(Λ, t0) := (1 - Pk)*Pc1(Λ, t0)*Pc2(Λ, t0) + Pk*sum(sum((1 - Λ*(1 + β)*v*e^((Λ*(1 - β)/(i + j) - 1/v)*t0)/(i + j))*combin(n1, i)*combin(n2, j)*P^(i + j)*(1 - P)^(n1 + n2 - i - j), j = 1 .. n2), i = 1 .. n1)
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B1(Λ, i, j, t0, t1, d, g) := g*(1 - Λ*(g + (1 - d)*β)*v/i*e^((Λ*(g + (1 - d)*β)/i - 1/v)*t0)) + (1 - g)*(1 - Λ*(1 - g + d*β)*v/j)*e^((Λ*(((1 - g) + d)*β)/j - 1/v)*(t0 - t1))
B2(Λ, i, j, t0, t1, d, g) := d*(1 - Λ*(d*β + (1 - g)*β)*v/j*e^((Λ*(d*β + 1 - g)/i - 1/v)*t0)) + (1 - d)*(1 - Λ*(g + (1 - d)*β)*v/j)*e^((Λ*((1 - d) + g)*β/i - 1/v)*(t0 - t1))
B(Λ, i, j, t0, t1, d, g) := B1(Λ, i, j, t0, t1, d, g)*B2(Λ, i, j, t0, t1, d, g)
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