λ1 := 10^-4
λ2 := 10^-4
μ := 1
Given
-2*(λ1 + λ2)*P0 + μ*P1 == 0
-μ*P1 + 2*λ1*P0 + λ1*P2 + μ*P4 == 0
-(λ1 + λ2 + λ1)*P2 + 2*λ2*P0 == 0
-(λ1 + λ2)*P3 + λ1*P2 == 0
P0 + P1 + P2 + P3 + P4 == 1
Find(P0, P1, P2, P3, P4) → [1875/3751; 3/15004; 1250/3751; 625/3751; 1/15004]
Given
P := [1; 0; 0; 0; 0]
D(t, P) := [
    -2*(λ1 + λ2)*P[0];
    -λ1*P[1] - 2*λ2*P[1] + 2*λ1*P[0];
    -(λ2 + 2*λ1)*P[2] + 2*λ2*P[0];
    -(λ1 + λ2)*P[3] + 2*λ1*P[1] + 2*λ2*P[2];
    λ1*P[1] + (λ1 + λ2)*P[3] + λ2*P[2]
]
F := rkfixed(P, 0, 100, 100, D) = [
    0, 1, 0, 0, 0, 0;
    1, 0.9996, 0.00019993, 0.00019993, 3.9988e-8, 1.9998e-8;
    2, 0.9992, 0.00039972, 0.00039972, 1.59904e-7, 7.9984e-8;
    3, 0.998801, 0.00059937, 0.00059937, 3.59676e-7, 1.79946e-7;
    4, 0.998401, 0.000798881, 0.000798881, 6.39232e-7, 3.19872e-7;
    5, 0.998002, 0.000998252, 0.000998252, 9.98501e-7, 4.9975e-7;
    6, 0.997603, 0.00119748, 0.00119748, 1.43741e-6, 7.19568e-7;
    7, 0.997204, 0.00139657, 0.00139657, 1.95589e-6, 9.79314e-7;
    8, 0.996805, 0.00159553, 0.00159553, 2.55386e-6, 1.27898e-6;
    9, 0.996406, 0.00179434, 0.00179434, 3.23126e-6, 1.61854e-6
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]
k := 0 .. 100
