Given
n1 := 3
n2 := 3
λ := 10^-4
μ := 1
t0 := 0.01
tk := 0.002
v := 0.01
β := 0.3
P1(Λ) := 1 - Λ*v/n1 - e^((Λ/n1 - 1/v)*t0)
P2(Λ) := 1 - β*Λ*v/n2 - e^((β*Λ/n2 - 1/v)*t0)
Pc(Λ) := P1(Λ)*P2(Λ)
Λ1(Λ) := Λ*(1 + β)/n1
Λ2(Λ) := Λ*(1 + β)/n2
P11(Λ) := Λ1(Λ)*v*e^((Λ1(Λ) - 1/v)*t0)
P12(Λ) := Λ2(Λ)*v*e^((Λ2(Λ) - 1/v)*(t0 - tk))
P21(Λ) := Λ1(Λ)*v*e^((Λ1(Λ) - 1/v)*(t0 - tk))
P22(Λ) := Λ2(Λ)*v*e^((Λ2(Λ) - 1/v)*t0)
P1c(Λ) := 1 - P11(Λ)*P12(Λ)
P2c(Λ) := 1 - P21(Λ)*P22(Λ)
Rc(Λ) := P1c(Λ)*P2c(Λ)
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