Given
λ := 10^-4
g := 0.7
μ := 1
μ0 := 1
-(g*λ*2 + (1 - g)*2*λ + λ0)*P0 + μ*P1 + (1 - g)*2*λ*P2 + μ0*P6 == 0
-(g*λ + μ)*P1 + μ*P5 + g*λ*P2 + μ0*P9 + g*λ*2*P0 == 0
-(g*λ + (1 - g)*λ + λ0)*P2 + μ*P3 + (1 - g)*2*λ*P0 == 0
-(2*λ + μ)*P3 + (1 - g)*λ*P1 + g*λ*P2 + 2*λ*g*P4 == 0
-(λ0 + 2*λ*g)*P4 + (1 - g)*λ*P2 == 0
-μ*P5 + g*λ*P1 + 2*λ*P3 + P10*μ0 == 0
-(μ0 + 2*λ)*P6 + λ0*P0 == 0
-(μ0 + λ)*P7 + 2*λ*P6 + λ0*P2 == 0
-(-μ0 + λ)*P9 + μ0*P7 == 0
-μ0*P10 + μ0*P8 + P9*λ == 0
P0 + P2 + P3 + P4 + P5 + P6 + P7 + P8 + P9 + P10 == 1
Find(P0, P1, P6, P3, P4, P5, P2, P7, P8, P9, P10) → [
    (1.04208336458e34*λ0^2 + 1.77170633603e30*λ0 + 3.1798024682e22)/(1.04312527916e34*λ0^3 + 1.04263590821e34*λ0^2 + 2.39740035355e30*λ0 + 1.06309540595e26);
    (2.08374997916e30*λ0^3 + 2.08452099582e30*λ0^2 + 3.16822521165e26*λ0 - 5.24626565754e21)/(1.04312527916e34*λ0^3 + 1.04263590821e34*λ0^2 + 2.39740035355e30*λ0 + 1.06309540595e26);
    (1.04187498958e34*λ0^3 + 1.77135206562e30*λ0^2 + 3.17916663488e22*λ0)/(1.04312527916e34*λ0^3 + 1.04263590821e34*λ0^2 + 2.39740035355e30*λ0 + 1.06309540595e26);
    (6.2499999375e25*λ0^3 + 6.25274993747e25*λ0^2 + 4.37726282123e25*λ0 + 8.75246755598e21)/(1.04312527916e34*λ0^3 + 1.04263590821e34*λ0^2 + 2.39740035355e30*λ0 + 1.06309540595e26);
    (1.87499998125e21*λ0 + 1.87593759374e25)/(1.04312527916e34*λ0^3 + 1.04263590821e34*λ0^2 + 2.39740035355e30*λ0 + 1.06309540595e26);
    (1.2503125025e31*λ0^3 + 3.75425104252e30*λ0^2 + 3.37733086517e26*λ0 - 3.41374422774e22)/(3.12937583748e34*λ0^3 + 3.12790772462e34*λ0^2 + 7.19220106064e30*λ0 + 3.18928621786e26);
    (6.2499999375e25*λ0^2 + 6.25312539997e29*λ0 + 8.75437543746e25)/(1.04312527916e34*λ0^3 + 1.04263590821e34*λ0^2 + 2.39740035355e30*λ0 + 1.06309540595e26);
    (2.08360411875e30*λ0^3 + 6.25604249985e29*λ0^2 + 8.75350072322e25*λ0)/(1.04312527916e34*λ0^3 + 1.04263590821e34*λ0^2 + 2.39740035355e30*λ0 + 1.06309540595e26);
    (1.25033125437e31*λ0^3 + 3.75400095564e30*λ0^2 + 3.37666553339e26*λ0 - 3.41415920422e22)/(3.12937583748e34*λ0^3 + 3.12790772462e34*λ0^2 + 7.19220106064e30*λ0 + 3.18928621786e26);
    -1.0*(6.2514375e30*λ0^3 + 1.87700045e30*λ0^2 + 2.62631284825e26*λ0)/(3.12937583748e34*λ0^3 + 3.12790772462e34*λ0^2 + 7.19220106064e30*λ0 + 3.18928621786e26);
    (1.25026874e31*λ0^3 + 3.75381325559e30*λ0^2 + 3.3764029021e26*λ0 - 3.41415920422e22)/(3.12937583748e34*λ0^3 + 3.12790772462e34*λ0^2 + 7.19220106064e30*λ0 + 3.18928621786e26)
]
p0(λ0) := (1.04208336458e34*λ0^2 + 1.77170633603e30*λ0 + 3.1798024682e22)/(1.04312527916e34*λ0^3 + 1.04263590821e34*λ0^2 + 2.39740035355e30*λ0 + 1.06309540595e26)
p1(λ0) := (2.08374997916e30*λ0^3 + 2.08452099582e30*λ0^2 + 3.16822521165e26*λ0 - 5.24626565754e21)/(1.04312527916e34*λ0^3 + 1.04263590821e34*λ0^2 + 2.39740035355e30*λ0 + 1.06309540595e26)
p6(λ0) := (1.04187498958e34*λ0^3 + 1.77135206562e30*λ0^2 + 3.17916663488e22*λ0)/(1.04312527916e34*λ0^3 + 1.04263590821e34*λ0^2 + 2.39740035355e30*λ0 + 1.06309540595e26)
K2(λ0) := p0(λ0) + p1(λ0) + p6(λ0)
Maximaize(K2(λ0)) → Maximaize((1.77170633603e30*λ0 + 1.04208336458e34*λ0^2 + 3.1798024682e22)/(2.39740035355e30*λ0 + 1.04263590821e34*λ0^2 + 1.04312527916e34*λ0^3 + 1.06309540595e26) + (3.16822521165e26*λ0 + 2.08452099582e30*λ0^2 + 2.08374997916e30*λ0^3 - 5.24626565754e21)/(2.39740035355e30*λ0 + 1.04263590821e34*λ0^2 + 1.04312527916e34*λ0^3 + 1.06309540595e26) + (3.17916663488e22*λ0 + 1.04187498958e34*λ0^3 + 1.77135206562e30*λ0^2)/(2.39740035355e30*λ0 + 1.04263590821e34*λ0^2 + 1.04312527916e34*λ0^3 + 1.06309540595e26))
Given
-(g*λ*2 + (1 - g)*2*λ)*P0 + μ*P1 + (1 - g)*2*λ*P2 == 0
-(g*λ + (1 - g)*λ)*P1 + μ*P5 + g*λ*P2 + P0*λ*g*2 == 0
-(g*λ*2 + (1 - g)*λ)*P2 + μ*P3 + (1 - g)*2*λ*P0 == 0
-(2*λ + μ)*P3 + (1 - g)*λ*P1 + g*λ*P2 + 2*λ*g*P4 == 0
-(2*λ*g)*P4 + (1 - g)*λ*P2 == 0
P0 + P1 + P2 + P3 + P4 + P5 == 1
Find(P0, P1, P2, P3, P4, P5) → [0.490044579219; 7.28119489593e-5; 0.419949448076; 4.19887314198e-5; 0.089989167445; -9.79954212612e-5]
K1 := 0.490010961409 + 7.28069539479e-5
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