Given
l := 1000
S := 10^7
v := l/S
t0 := v
λ := 10^-1 .. 10^4
b := 10^-9
m := 5
k := 2
n := 4
P(λ, k) := 1 - k*λ*v*e^((λ - 1/v)*t0)/n
P1(λ, k) := 1 - (1 - P(λ, k)^m)^k
P2(λ, k) := (1 - (1 - P(λ, k))^k)^m
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a := (1 - b)^l
A1(λ, k) := 1 - (1 - a^(m + 1)*P(λ, k)^m)^k
A2(λ, k) := 1 - (1 - a*P(λ, k)^k)*(1 - (1 - a^2*P(λ, k))^k)
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