Given
λ0 := 1.15*10^-5
λ1 := 3.425*10^-6
λ2 := 2.3*10^-6
μ0 := 0.33
μ1 := 0.17
μ2 := 0.33
μ3 := 1
μ4 := 2
-(2*λ0 + λ2 + 2*λ1)*P0 + μ3*P4 == 0
-(μ0 + λ1 + λ0)*P1 + 2*λ0*P0 + λ0*P4 + μ4*P5 + μ0*P8 == 0
-(μ2 + λ1 + λ0)*P2 + λ2*P0 + λ2*P4 + μ1*P9 + μ0*P10 == 0
-(μ1 + λ1 + λ0)*P3 + 2*λ1*P0 + μ1*P11 + μ0*P12 + λ1*P4 + μ4*P6 + μ0*P7 == 0
-(μ3 + λ0 + λ2 + λ1 + λ1 + λ0)*P4 + μ0*P1 + μ2*P2 + μ1*P3 == 0
-(μ4 + λ1 + λ0)*P5 + λ0*P4 == 0
-(μ4 + λ1 + λ0)*P6 + λ1*P4 == 0
-μ0*P7 + λ1*P5 + λ1*P1 == 0
-μ0*P8 + λ0*P5 + λ0*P1 == 0
-μ1*P9 + λ1*P2 == 0
-μ0*P10 + λ0*P2 == 0
-μ1*P11 + λ1*P3 + λ1*P6 == 0
P0 + P1 + P2 + P3 + P4 + P5 + P6 + P7 + P8 + P9 + P10 + P11 + P12 == 1
P := Find(P0, P1, P2, P3, P4, P5, P6, P7, P8, P9, P10, P11, P12) → [0.999850901017; 6.96880950933e-5; 6.96888183731e-6; 4.02908091117e-5; 3.21452064677e-5; 1.84833557869e-10; 5.50482552783e-11; 7.23279874998e-10; 2.42853096715e-9; 1.40402472311e-10; 2.42854973118e-10; 8.11742410281e-10; 1.40407556921e-9]
Kg := P[0] + P[1] + P[2] + P[3] + P[4] → 0.999999994009
t := 1 .. 10^5
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Given
-(2*λ0 + λ2 + 2*λ1)*R0 + μ3*R4 == 0
-(λ0 + λ1 + μ0)*R1 + λ0*R4 + 2*λ0*R0 == 0
-(λ0 + λ1 + μ2)*R2 + λ2*R4 + λ2*R0 == 0
-(λ0 + λ1 + μ1)*R3 + λ1*R4 + 2*λ1*R0 == 0
-(λ0 + λ2 + λ1 + λ0 + λ1 + μ3)*R4 + μ0*R1 + μ2*R2 + μ1*R3 == 0
R0 + R1 + R2 + R3 + R4 + R5 == 1
R := Find(R0, R1, R2, R3, R4, R5) → [0; 0; 0; 0; 0; 1.0]
RKg := (R[0] + R[1] + R[2] + R[3] + R[4]) → 0
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Given
μ5 := 10^0
-(2*λ0 + λ2 + 2*λ1)*R0 + μ3*R4 + μ5*R5 == 0
-(λ0 + λ1 + μ0)*R1 + λ0*R4 + 2*λ0*R0 == 0
-(λ0 + λ1 + μ2)*R2 + λ2*R4 + λ2*R0 == 0
-(λ0 + λ1 + μ1)*R3 + λ1*R4 + 2*λ1*R0 == 0
-(λ0 + λ2 + λ1 + λ0 + λ1 + μ3)*R4 + μ0*R1 + μ2*R2 + μ1*R3 == 0
R0 + R1 + R2 + R3 + R4 + R5 == 1
R := Find(R0, R1, R2, R3, R4, R5) → [0.999850916458; 6.9684547518e-5; 6.96856676016e-6; 4.02852212384e-5; 3.21429819254e-5; 2.22503866282e-9]
RKg := (R[0] + R[1] + R[2] + R[3] + R[4]) → 0.999999997775
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